#-------------------------- Initial Setup -------------------------------------#
units       lj
atom_style  atomic
dimension   3
boundary    p p p
timestep    0.01
#------------------------------------------------------------------------------#

#-------------------------- Atomic Setup --------------------------------------#
region film block 0 100 0 6 0 6 # Geometrical region.
create_box 1 film # Create simulation box.
create_atoms 1 random 3600 30 film # Create atoms at random within film.
neigh_modify every 1 delay 0 check yes # Update neighbor list.
mass 1 1
pair_style table linear 100000
pair_coeff * 1 potential.table CUSTOM 2.5
minimize 1.0e-4 1.0e-6 1000 1000
#------------------------------------------------------------------------------#

#-------------------------------- Outputs -------------------------------------#
thermo 1000
thermo_style custom step temp press density ly
#compute stress all centroid/stress/atom NULL
#compute stress all stress/atom NULL
dump 1 all atom 1000 traj_custom_lin_bar.out
dump 3 all xyz 1000 traj_custom_lin_bar.xyz
dump_modify 1 sort id append yes
#dump_modify 2 sort c_stress[*] append yess
#dump 2 all custom 1000 stress.out c_stress[*]
pair_write 1 1 100000 r .0001 4 interp.table CUSTOM

#------------------------------------------------------------------------------#

#------------------------- Running the Simulation -----------------------------#
fix 1 all nve/limit 0.1
fix 2 all langevin 2.0 2.0 0.5 1530917 zero yes
velocity all create 2.0 4928351 mom yes rot yes dist gaussian
run 5000
unfix 1
unfix 2
#------------------------------------------------------------------------------#

fix 10 all nvt temp 3 0.1 $(100.0*dt)
run 5000
unfix 10

fix 20 all npt temp 0.1 0.1 $(100.0*dt) y 0 0 $(1000.0*dt)
run 5000
unfix 20

change_box all y final -40 40

fix 30 all nvt temp 0.1 0.1 $(100.0*dt)
run 5000

fix 40 all deform 1 x scale 0.6 remap x units box
run 10000

unfix 40
run 10000
